# PTP проверка формулы
t1_sync := 1002
t2_getSync := 7215
t3_req := 7315
t4_resp := 1450
dT := ((t2_getSync - t1_sync) - (t4_resp - t3_req))/2 = 6039
dt := [
    71346; 70534; 71219; 71228; 71207; 71220; 70780; 71207; 71230; 71221
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]
N := last(dt) = 659
n := 0 .. N  # Время такого замера несколько секунд!  # где-то 10
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# Тенденция к смещению есть!!!
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L := 100
xx(range) := histogram(L, range)[:, 0]
yy(range) := histogram(L, range)[:, 1]
i := 0 .. last(xx(dt))
p(R) := yy(R)/(xx(R)[1] - xx(R)[0])
dt := □  # error: Пустой местозаполнитель.
