N := 600
dT := transpose([
    12, 20, 15, 49, 10, 21, 19, 15, 38, 1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])
n := 0 .. last(dT)
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L := 50
xx(dt) := histogram(L, dt)[:, 0]
yy(dt) := histogram(L, dt)[:, 1]
xx
p(T, Tmax) := yy(T)*(Tmax/1000)/(1000*(xx(T)[1] - xx(T)[0]))
