v := 343  # м/с
# Максимальная задержка по тз | Максимальная задержка ESP32 NOW
delayTZ := 1/48000 = 2.08333e-5  # с
delayCurrent := 60*10^-6  # c
delayTZ*10^6 = 20.8333  # мкс
S_error := v*delayTZ*1000 = 7.14583  # мм
S_currentError := v*delayCurrent*1000 = 20.58  # мм
