R11 := transpose([
    14, 16, 20, 14, 27, 17, 19, 17, 19, 35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])
R21 := transpose([
    12, 20, 15, 49, 10, 21, 19, 15, 38, 1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])
n := 0 .. last(R11)
L := 1000
xx(R) := histogram(L, R)[:, 0]
n2 := 0 .. last(R21)
yy(R) := histogram(L, R)[:, 1]
i2 := 0 .. last(xx(R21))
i := 0 .. last(xx(R11))
# -Гистограмма распределения СВ
p(R, Rmax) := yy(R)*(Rmax/1000)/(1000*(xx(R)[1] - xx(R)[0]))
________________________________________________________________
M(R) := sum(R[i], i = 0 .. L - 1)/L
# - Мат. ожидание
#
# - Дисперсия
#
# - СКО
D(R) := sum((R[i] - M(R))^2, i = 0 .. L - 1)/L
sigma(R) := sqrt(D(R))
# Для конкретных выборок:
M(R11) = 31.317
D(R11) = 41047
3*sigma(R11) = 607.802
fnorm(x, m, s) := 1/(s*sqrt(2*π))*exp(-(x - m)^2/(2*s^2))
R1 := 1000
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